// COMSOL Multiphysics 6.3.0.290 model "airfoil_DES_3D_PILOT_meshcheck.mph"
// Outline of the model tree

Parameters
  c = 1[m]
  Re = 5e5
  aoa = 25[deg]
  rho = 1.225[kg/m^3]
  mu = 1.787e-5[Pa*s]
  U0 = Re*mu/(rho*c)
  Uinf = U0
  u0 = U0*cos(aoa)
  v0 = U0*sin(aoa)
  w0 = 0[m/s]
  Lspan = 0.2[m]

Selections
  selIn: Box
    entitydim = 2
    xmin = -8.00001
    xmax = -7.99999
    ymin = -10.00001
    ymax = 10.00001
    zmin = -1.0E-5
    zmax = 0.20001
    condition = inside
  selOut: Box
    entitydim = 2
    xmin = 15.99999
    xmax = 16.00001
    ymin = -10.00001
    ymax = 10.00001
    zmin = -1.0E-5
    zmax = 0.20001
    condition = inside
  selTop: Box
    entitydim = 2
    xmin = -8.00001
    xmax = 16.00001
    ymin = 9.99999
    ymax = 10.00001
    zmin = -1.0E-5
    zmax = 0.20001
    condition = inside
  selBottom: Box
    entitydim = 2
    xmin = -8.00001
    xmax = 16.00001
    ymin = -10.00001
    ymax = -9.99999
    zmin = -1.0E-5
    zmax = 0.20001
    condition = inside
  selFoil: Box
    entitydim = 2
    xmin = -0.15
    xmax = 1.15
    ymin = -0.4
    ymax = 0.4
    zmin = -1.0E-5
    zmax = 0.20001
    condition = inside
  selSpan0: Box
    entitydim = 2
    xmin = -8.00001
    xmax = 16.00001
    ymin = -10.00001
    ymax = 10.00001
    zmin = -1.0E-5
    zmax = 1.0E-5
    condition = inside
  selSpan1: Box
    entitydim = 2
    xmin = -8.00001
    xmax = 16.00001
    ymin = -10.00001
    ymax = 10.00001
    zmin = 0.19999
    zmax = 0.20001
    condition = inside

Geometry
  geom1 "Geometry 1" (3D, length unit m)
    wp1: WorkPlane
      rect1: Rectangle | size = {24, 20}; pos = {-8, -10}
      foil1: Polygon
        x = {0, 0.000251728808407, 0.00100666176406, 0.00226403871346, 0.0040225935846, 0.0062805556618, 0.00903565136865, 0.0122851065573, 0.0160256493018, 0.0202535131928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}
        y = {0, 0.00280731873435, 0.00557569683784, 0.00830400178227, 0.0109908264611, 0.0136344980718, 0.0162330903265, 0.0187844388398, 0.0212861595037, 0.0237356696229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}
      dif1: Difference | input = rect1; input2 = foil1
    ext1: Extrude | workplane = wp1; input = wp1.dif1; distance = 0.2
    fin: Finalize "Form Union"

Materials
  mat1: Common "Air (constant properties)" on all domains
    def: def "Basic"
      density = rho
      dynamicviscosity = mu

Physics
  spf: DESRBVMSpalartAllmaras on all domains
    dependent variable u = {u, v, w}
    fp1: FluidProperties (default)
    init1: init "Initial Values 1" (default)
    wallbc1: WallBC "Wall 1" (default)
    inl1: InletBoundary "Inlet 1" on selection selIn | ComponentWise = VelocityFieldComponentWise; u0 = {u0, v0, 0}
    out1: OutletBoundary "Outlet 1" on selection selOut
    openTop: OpenBoundary on selection selTop
    openBottom: OpenBoundary on selection selBottom
    pfc1: PeriodicFlowCondition on boundaries 3, 4 | destinationDomains: boundaries 4

Mesh
  mesh1 "Mesh 1" (physics-controlled)
    size: MeshSizeDefault | table = cfd; hauto = 9

Studies
  std1 "Study 1"
    wdi: WallDistanceInitialization
    time: Transient "Time Dependent" | tlist = range(0,0.005,1); initialtime = 0