// COMSOL Multiphysics 6.3.0.290 model "airfoil_URANS_2D.mph"
// Outline of the model tree

Parameters
  c = 1 [m]
  Re = 5e5
  rho = 1.225 [kg/m^3]
  mu = 1.787e-5 [Pa*s]
  aoa = 25 [deg]
  U0 = Re*mu/(rho*c)
  u0 = U0*cos(aoa)
  v0 = U0*sin(aoa)
  hmax = 0.150000 [m]  // Maximum mesh size

Couplings
  intop1: Integration on boundaries 4-401 | opname = int_air

Probes
  var1: GlobalVariable "Lift"
    probename = Lift
    expr = -int_air(spf.T_stressy*cos(aoa)-spf.T_stressx*sin(aoa))
    unit = N/m
  var2: GlobalVariable "Drag"
    probename = Drag
    expr = -int_air(spf.T_stressx*cos(aoa) + spf.T_stressy*sin(aoa))
    unit = N/m

Geometry
  geom1 "Geometry 1" (2D, length unit m)
    pol1: Polygon
      source = table
      table = 
        {0.00000000, 0.00000000}
        {0.00006231, 0.00140141}
        {0.00024921, 0.00279331}
        {0.00056065, 0.00417557}
        {0.00099657, 0.00554807}
        {0.00155685, 0.00691066}
        {0.00224136, 0.00826318}
        {0.00304991, 0.00960543}
        {0.00398232, 0.01093724}
        {0.00503834, 0.01225838}
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    r1: Rectangle | size = {24, 20}; pos = {-8, -10}
    dif1: Difference | input = r1; input2 = pol1
    fin: Finalize "Form Union"

Materials
  mat1: Common "Air" on all domains
    def: def "Basic"
      thermalexpansioncoefficient = alpha_p(pA,T)
      molarmass = 0.02897[kg/mol]
      bulkviscosity = muB(T)
      relpermeability = 1
      relpermittivity = 1
      dynamicviscosity = eta(T)
      ratioofspecificheat = 1.4
      electricconductivity = 0[S/m]
      heatcapacity = Cp(T)
      density = rho(pA,T)
      thermalconductivity = k(T)
      soundspeed = cs(T)
      eta: Piecewise | arg = T; pieces = {200.0, 1600.0, -8.38278E-7+8.35717342E-8*T^1-7.69429583E-11*T^2+4.6437266E-14*T^3-1.06585607E-17*T^4}; argunit = K; fununit = Pa*s
      Cp: Piecewise | arg = T; pieces = {200.0, 1600.0, 1047.63657-0.372589265*T^1+9.45304214E-4*T^2-6.02409443E-7*T^3+1.2858961E-10*T^4}; argunit = K; fununit = J/(kg*K)
      rho: Analytic | expr = pA*0.02897/R_const[K*mol/J]/T; args = {pA, T}; fununit = kg/m^3; argunit = {Pa, K}
      k: Piecewise | arg = T; pieces = {200.0, 1600.0, -0.00227583562+1.15480022E-4*T^1-7.90252856E-8*T^2+4.11702505E-11*T^3-7.43864331E-15*T^4}; argunit = K; fununit = W/(m*K)
      cs: Analytic | expr = sqrt(1.4*R_const[K*mol/J]/0.02897*T); args = T; fununit = m/s; argunit = K
      an1: Analytic | funcname = alpha_p; expr = -1/rho(pA,T)*d(rho(pA,T),T); args = {pA, T}; fununit = 1/K; argunit = {Pa, K}
      an2: Analytic "Analytic 2a" | funcname = muB; expr = 0.6*eta(T); args = T; fununit = Pa*s; argunit = K
    RefractiveIndex: RefractiveIndex
      n = 1
      ki = 0
    NonlinearModel: NonlinearModel
      BA = def.gamma-1
    idealGas: idealGas
      Rs = R_const/Mn
      heatcapacity = Cp(T)
      ratioofspecificheat = 1.4
      molarmass = 0.02897[kg/mol]
      Cp: Piecewise | arg = T; pieces = {200.0, 1600.0, 1047.63657-0.372589265*T^1+9.45304214E-4*T^2-6.02409443E-7*T^3+1.2858961E-10*T^4}; argunit = K; fununit = J/(kg*K)

Physics
  spf: TurbulentFlowkomega "Turbulent Flow, k-ω" on all domains
    dependent variable u = {u, v, w}
    TurbulenceModelProperty.TurbulenceModelType = RANS
    fp1: FluidProperties (default)
    init1: init "Initial Values 1" (default)
    wallbc1: WallBC "Wall 1" (default) | BoundaryCondition = NoSlip
    inl1: InletBoundary "Inlet 1" on boundaries 1
      ComponentWise = VelocityFieldComponentWise
      U0in = U0
      u0 = {u0, v0, 0}
    out1: OutletBoundary "Outlet 1" on boundaries 402
    open1: OpenBoundary on boundaries 2, 3

Mesh
  mesh1 "Mesh 1"
    size: MeshSizeDefault | hmax = hmax; hauto = 4; custom = on
    ftri1: FreeTri "Free Triangular 1" on remaining entities
    bl1: BndLayer "Boundary Layers 1" on entire geometry | sharpcorners = trim
      blp: BndLayerProp "Boundary Layer Properties" on boundaries 4-401 | blnlayers = 20; inittype = blhmin; blhmin = 4e-5

Studies
  std1 "Study 1"
    stat: Stationary | errestandadap = none; meshadaptmethod = rebuild
  std2 "URANS 2D - transient k-omega"
    stat: Stationary
    time: Transient "Time Dependent" | tlist = range(0,0.005,1.0052)

Solver configurations
  sol1 "Solution 1" (study std1)
    v1: Variables "Dependent Variables 1"
    s1: Stationary "Stationary Solver 1"
      se1: Segregated
        ss1: SegregatedStep "Velocity u, Pressure p"
        ss2: SegregatedStep "Turbulence Variables"
        ll1: LowerLimit
      d1: Direct "Direct, fluid flow variables (spf)"
      d2: Direct "Direct, turbulence variables (spf)"

Datasets
  dset1: Solution | solution = sol1
  edg1: Edge2D "Exterior Walls" on boundaries 2-401 | data = dset1

Plots
  pg1: PlotGroup2D "Velocity (spf)" | data = dset1
    surf1: Surface | expr = spf.U
  pg2: PlotGroup2D "Pressure (spf)" | data = dset1
    con1: Contour | expr = p; levelrounding = off
  pg3: PlotGroup2D "Wall Resolution (spf)" | data = dset1
    line1: Line "Wall Resolution" | expr = spf.Delta_wPlus; linetype = tube
      hght1: Height "Height Expression" | heightdata = expr; expr = spf.WRHeightExpr